*Heading
** Job name: Tet_Heat2 Model name: Model-1
** Generated by: Abaqus/CAE 6.14-2
*Preprint, echo=NO, model=NO, history=NO, contact=NO
**
** PARTS
**
*Part, name=Part-1
*Node
      1,           0.,           0.,  0.100000001
      2,           0.,  0.200000003,  0.100000001
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*Element, type=DC3D4
    1, 1003, 1004, 1005, 1006
    2, 1007, 1004, 1008, 1006
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*End Part
**
**
** ASSEMBLY
**
*Assembly, name=Assembly
**
*Instance, name=Part-1-1, part=Part-1
*End Instance
**
*Nset, nset=Bottom
   1,   4,   7,   8,  56,  57
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*Elset, elset=Bottom
   329,  1151,  1695,  1727,  1803,  1831
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*Nset, nset=Top
   2,   3,   5,   6,  28,  29
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*Elset, elset=Top
   222,   977,  1011,  1160,  1295,  1642
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*End Assembly
**
** MATERIALS
**
*Material, name=Material-1
*Conductivity
 0.001,
*Density
1.,
** ----------------------------------------------------------------
**
** STEP: Step-1
**
*Step, name=Step-1, nlgeom=NO
*Heat Transfer, end=PERIOD, deltmx=1.
1., 1., 1e-05, 1.,
**
** BOUNDARY CONDITIONS
**
** Name: BC-1 Type: Temperature
*Boundary
Part1-1.Top, 11, 11, 100.
** Name: BC-2 Type: Temperature
*Boundary
Part1-1.Bottom, 11, 11
**
** OUTPUT REQUESTS
**
*Restart, write, frequency=0
**
** FIELD OUTPUT: F-Output-1
**
*Output, field, variable=PRESELECT
*Output, history, frequency=0
*End Step
