*Heading
** Job name: channel_tet_elem Model name: Model-channel
** Generated by: Abaqus/CAE 6.11-1
*Preprint, echo=NO, model=NO, history=NO, contact=NO
**
** PARTS
**
*Part, name=Part-1
*End Part
**
**
** ASSEMBLY
**
*Assembly, name=Assembly
**
*Instance, name=Part-1-1, part=Part-1
*Node
      1,  0.100000001,  0.200000003,  0.100000001
      2,  0.100000001,           0.,  0.100000001
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*Element, type=DC3D4
    1, 1003, 1004, 1005, 1006
    2, 1007, 1008, 1009, 1003
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*Nset, nset=_PickedSet2, internal, generate
    1,  2706,     1
*Elset, elset=_PickedSet2, internal, generate
     1,  13092,      1
*Nset, nset=top
   1,   4,   7,   8,  56,  57
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*Elset, elset=top
    92,   839,  1735,  1826,  2062,  2087
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*Nset, nset=body, generate
    1,  2706,     1
*Elset, elset=body, generate
     1,  13092,      1
*Elset, elset=bottom
    21,    58,   421,   720,  1040,  1121
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
** Section: Section-1
*Solid Section, elset=_PickedSet2, material=Material-1
,
*End Instance
**
*End Assembly
**
** MATERIALS
**
*Material, name=Material-1
*Conductivity
 0.001,
*Density
1.,
** ----------------------------------------------------------------
**
** STEP: Step-1
**
*Step, name=Step-1
*Heat Transfer, steady state, deltmx=0.1
1., 1., 1e-05, 1.,
**
** BOUNDARY CONDITIONS
**
** Name: top_drichlet Type: Temperature
*Boundary
Part-1-1.top, 11, 11, 100.
**
** LOADS
**
*Dflux
Part-1-1.body, BF, 0.0
** Name: bottom_neuman   Type: Surface heat flux
*Dsflux
Part-1-1.bottom, S, 1.
**
** OUTPUT REQUESTS
**
*Restart, write, frequency=0
**
** FIELD OUTPUT: F-Output-1
**
*Output, field, variable=PRESELECT
*Output, history, frequency=0
*End Step
